*Heading
** Job name: Job-1 Model name: Model-1
** Generated by: Abaqus/CAE 6.14-2
*Preprint, echo=NO, model=NO, history=NO, contact=NO
**
** PARTS
**
*Part, name=Part-1
*End Part
**
**
** ASSEMBLY
**
*Assembly, name=Assembly
**
*Instance, name=Part-1-1, part=Part-1
*Node
      100000,   24.9664021,    22.578661,           0.
      2,   24.5825748,          20.,           0.
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*Element, type=C3D8R
   1,   12,  207,  344,   13,  403,  598,  735,  404
   2,  367,   27,    2,  366,  758,  418,  393,  757
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*Nset, nset=Set-1, generate
    1,  3128,     1
*Elset, elset=Set-1, generate
    1,  2030,     1
** Section: Section-1
*Solid Section, elset=Set-1, material=Material-1
,
*End Instance
**
*Nset, nset=Set-constrain, instance=Part-1-1
   20,   21,  110,  111,  112,  113
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*Nset, nset=Set-load, instance=Part-1-1
   24,   25,  169,  170,  171,  172
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*End Assembly
**
** MATERIALS
**
*Material, name=Material-1
*Elastic
210000., 0.3
** ----------------------------------------------------------------
**
** STEP: Step-load
**
*Step, name=Step-load, nlgeom=NO
*Static
1., 1., 1e-05, 1.
**
** BOUNDARY CONDITIONS
**
** Name: BC-1 Type: Displacement/Rotation
*Boundary
Set-constrain, 1, 1
Set-constrain, 2, 2
Set-constrain, 3, 3
**
** LOADS
**
** Name: Load-1   Type: Concentrated force
*Cload
Set-load, 2, -100.
**
** OUTPUT REQUESTS
**
*Restart, write, frequency=0
**
** FIELD OUTPUT: F-Output-1
**
*Output, field, variable=PRESELECT
**
** HISTORY OUTPUT: H-Output-1
**
*Output, history, variable=PRESELECT
*End Step
