*Heading
** Job name: Job-cafull Model name: Model-1
** Generated by: Abaqus/CAE 2021
*Preprint, echo=NO, model=NO, history=NO, contact=NO
**
** PARTS
**
*Part, name=Part-1
*End Part
**
**
** ASSEMBLY
**
*Assembly, name=Assembly
**
*Instance, name=Part-1-1, part=Part-1
*Node
      1,          15.,          35.,           0.
      2,          15.,          35.,           5.
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*Element, type=C3D4
    1, 5485, 5486, 5487, 5488
    2, 5485, 5489, 5487, 5486
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*Nset, nset=Set-1, generate
     1,  11358,      1
*Elset, elset=Set-1, generate
     1,  50797,      1
** Section: Section-1
*Solid Section, elset=Set-1, material=Material-1
,
*End Instance
**
*Elset, elset=Set-del, instance=Part-1-1, generate
 31927,  44902,      1
*Nset, nset=Set-fix, instance=Part-1-1
   29,   30,   31,   32, 1087, 1088
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*Nset, nset=Set-load, instance=Part-1-1
  19,  21, 679, 680, 681, 682
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*End Assembly
**
** MATERIALS
**
*Material, name=Material-1
*Elastic
 2.1e+10, 0.3
** ----------------------------------------------------------------
**
** STEP: Step-1
**
*Step, name=Step-1, nlgeom=NO
*Static
1., 1., 1e-05, 1.
**
** BOUNDARY CONDITIONS
**
** Name: BC-1 Type: Symmetry/Antisymmetry/Encastre
*Boundary
Set-fix, ENCASTRE
**
** LOADS
**
** Name: Load-1   Type: Concentrated force
*Cload
Set-load, 3, -200000.
**
** OUTPUT REQUESTS
**
*Restart, write, frequency=0
**
** FIELD OUTPUT: F-Output-1
**
*Output, field, variable=PRESELECT
**
** HISTORY OUTPUT: H-Output-1
**
*Output, history, variable=PRESELECT
*End Step
