*Heading
** Job name: NLFEA Model name: Model-1
** Generated by: Abaqus/CAE 6.14-2
*Preprint, echo=NO, model=NO, history=NO, contact=NO
**
** PARTS
**
*Part, name=Part-1
*Node
      1,          20.,           5.,           5.
      2,           0.,           0.,           5.
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*Element, type=C3D4
    1,  3961,  3962,  3963,  3964
    2,  3961,  3965,  3966,  3967
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*Nset, nset=_PickedSet2, internal, generate
     1,  13529,      1
*Elset, elset=_PickedSet2, internal, generate
     1,  69376,      1
*Nset, nset=Set-load
   1,   4, 125, 126, 127, 128, 129, 130, 131, 132, 133, 134, 135, 136
*Nset, nset=Set-fix
    2,    3,    7,    8,   62,   63
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** Section: Section-1
*Solid Section, elset=_PickedSet2, material=Material-1
,
*End Part
**
**
** ASSEMBLY
**
*Assembly, name=Assembly
**
*Instance, name=Part-1-1, part=Part-1
*End Instance
**
*End Assembly
**
** MATERIALS
**
*Material, name=Material-1
*Elastic
2100000000., 0.3
** ----------------------------------------------------------------
**
** STEP: Step-1
**
*Step, name=Step-1, nlgeom=YES
*Static
0.001, 1., 1e-05, 0.1
**
** BOUNDARY CONDITIONS
**
** Name: BC-1 Type: Symmetry/Antisymmetry/Encastre
*Boundary
Part-1-1.Set-fix, ENCASTRE
**
** LOADS
**
** Name: Load-1   Type: Concentrated force
*Cload
Part-1-1.Set-load, 2, -1000000.
**
** OUTPUT REQUESTS
**
*Restart, write, frequency=0
**
** FIELD OUTPUT: F-Output-1
**
*Output, field, variable=PRESELECT
**
** HISTORY OUTPUT: H-Output-1
**
*Output, history, variable=PRESELECT
*End Step
