*Heading
** Job name: Job-1 Model name: Model-1
** Generated by: Abaqus/CAE 6.14-2
*Preprint, echo=NO, model=NO, history=NO, contact=NO
**
** PARTS
**
*Part, name="Shaft Bracket"
*Node
      1,  -2.04597712,         0.75,  0.754999995
      2,  -2.04597712,         0.75,        1.505
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*Element, type=C3D8
  1,  712,  623,  631,  638, 3163, 3074, 3082, 3089
  2,   48,   47,  629,  626, 1041, 1042, 3080, 3077
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*Element, type=C3D4
 1329, 3806, 3807, 3808, 3809
 1330, 3806, 3807, 3809, 3810
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*Nset, nset=_PickedSet2, internal, generate
    1,  6318,     1
*Elset, elset=_PickedSet2, internal, generate
     1,  21741,      1
** Section: Section-1
*Solid Section, elset=_PickedSet2, material=Material-1
,
*End Part
**
**
** ASSEMBLY
**
*Assembly, name=Assembly
**
*Instance, name="Shaft Bracket-1", part="Shaft Bracket"
*End Instance
**
*Nset, nset=Set-fix, instance="Shaft Bracket-1"
    1,    2,   13,   14,   45,   46
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*Nset, nset=Set-load, instance="Shaft Bracket-1"
   15,   16,   24,   25,  208,  209
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*Elset, elset="__T0_Shaft Bracket-1_M_S5", internal, instance="Shaft Bracket-1"
  20,  28, 108, 110, 185, 193, 273, 275, 350, 358, 438, 440, 515, 523, 603, 605
*Elset, elset="__T0_Shaft Bracket-1_M_S6", internal, instance="Shaft Bracket-1"
  14,  29,  76, 109, 179, 194, 241, 274, 344, 359, 406, 439, 509, 524, 571, 604
*Elset, elset="__T0_Shaft Bracket-1_M_S3", internal, instance="Shaft Bracket-1"
  24,  33,  37,  38, 102, 104
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*Elset, elset="__T0_Shaft Bracket-1_M_S4", internal, instance="Shaft Bracket-1", generate
  58,  553,  165
*Surface, type=ELEMENT, name="_T0_Shaft Bracket-1_M", internal
"__T0_Shaft Bracket-1_M_S5", S5
"__T0_Shaft Bracket-1_M_S6", S6
"__T0_Shaft Bracket-1_M_S4", S4
"__T0_Shaft Bracket-1_M_S3", S3
*Elset, elset="__T0_Shaft Bracket-1_S_S3", internal, instance="Shaft Bracket-1"
  4103,  8841,  9375, 10877, 11076, 11096
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*Surface, type=ELEMENT, name="_T0_Shaft Bracket-1_S", internal
"__T0_Shaft Bracket-1_S_S3", S3
*Tie, name="_T0_Shaft Bracket-1", adjust=no
"_T0_Shaft Bracket-1_S", "_T0_Shaft Bracket-1_M"
*Elset, elset="__T1_Shaft Bracket-1_M_S5", internal, instance="Shaft Bracket-1"
  707,  751,  783,  786,  874,  918,  950,  953, 1041, 1085, 1117, 1120, 1208, 1252, 1284, 1287
*Elset, elset="__T1_Shaft Bracket-1_M_S6", internal, instance="Shaft Bracket-1"
  675,  698,  706,  752,  781,  842
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*Elset, elset="__T1_Shaft Bracket-1_M_S3", internal, instance="Shaft Bracket-1"
  700,  703,  745,  764,  867,  870,  912,  931, 1034, 1037, 1079, 1098, 1201, 1204, 1246, 1265
*Elset, elset="__T1_Shaft Bracket-1_M_S4", internal, instance="Shaft Bracket-1"
  691,  776,  858,  943, 1025, 1110, 1192, 1277
*Surface, type=ELEMENT, name="_T1_Shaft Bracket-1_M", internal
"__T1_Shaft Bracket-1_M_S5", S5
"__T1_Shaft Bracket-1_M_S6", S6
"__T1_Shaft Bracket-1_M_S4", S4
"__T1_Shaft Bracket-1_M_S3", S3
*Elset, elset="__T1_Shaft Bracket-1_S_S3", internal, instance="Shaft Bracket-1"
  4042,  4160,  5575,  5578,  5590,  5607
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*Elset, elset="__T1_Shaft Bracket-1_S_S2", internal, instance="Shaft Bracket-1"
 12438,
*Surface, type=ELEMENT, name="_T1_Shaft Bracket-1_S", internal
"__T1_Shaft Bracket-1_S_S3", S3
"__T1_Shaft Bracket-1_S_S2", S2
*Tie, name="_T1_Shaft Bracket-1", adjust=no
"_T1_Shaft Bracket-1_S", "_T1_Shaft Bracket-1_M"
*End Assembly
**
** MATERIALS
**
*Material, name=Material-1
*Density
7800.,
*Elastic
 2.1e+09, 0.3
** ----------------------------------------------------------------
**
** STEP: Step-load
**
*Step, name=Step-load, nlgeom=NO
*Dynamic, Explicit
, 0.1
**
** BOUNDARY CONDITIONS
**
** Name: BC-1 Type: Symmetry/Antisymmetry/Encastre
*Boundary
Set-fix, ENCASTRE
**
** LOADS
**
** Name: Load-1   Type: Concentrated force
*Cload
Set-load, 3, -100000.
**
** OUTPUT REQUESTS
**
*Restart, write, frequency=0
**
** FIELD OUTPUT: F-Output-1
**
*Output, field, variable=PRESELECT
**
** HISTORY OUTPUT: H-Output-1
**
*Output, history, variable=PRESELECT
*End Step
