*Heading
** Job name: Job-ele12k Model name: ncf_R_c3d4_length100
** Generated by: Abaqus/CAE 2020
*Preprint, echo=NO, model=NO, history=NO, contact=NO
**
** PARTS
**
*Part, name=bracket_length_100mm-1
*Node
      1,   -13.867816,   19.0499992,       19.177
      2,  -4.21581602,   19.0499992,       19.177
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*Element, type=C3D4
   1,  979,  980,  827,  981
   2,  982,  983,  984,  985
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*Nset, nset=Set-1, generate
    1,  2912,     1
*Elset, elset=Set-1, generate
    1,  12179,     1
*End Instance
*BndMesh_F
1790, 2715, 3824, 3836, 3983, 4843, 5443, 6056, 6454, 6484, 7091, 7099, 7116, 7167, 7187, 7237, 7267, 7272, 7300, 7316, 7340,
702, 1818, 5813, 6426, 6540, 6692, 7082, 7215, 7232, 7253, 7351,
183, 417, 419, 546, 587, 636, 1120, 1121, 1185, 1620, 1638, 1686, 1698, 1726, 2242, 2514, 2681, 2696, 2698, 2849, 3745, 3797, 3803, 3820, 3856, 3867, 3970, 3975, 4156, 4384, 4422, 4478, 4481, 4490, 4502, 4678, 4695, 4819, 4828, 4856, 4900, 4935, 4984, 5004, 5008, 5010, 5035, 5054, 5055, 5366, 5595, 5596, 5614, 5636, 5656, 5667, 5668, 5814, 5919, 5922, 5955, 5960, 5963, 5974, 6020, 6044, 6079, 
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1263, 1626, 4484, 4506, 4713, 4720, 5618, 5619, 5676, 5681, 5917, 6283, 6433, 6987, 7136, 7137, 7293, 7344, 7376, 8194,
*BndMesh_C
9474, 10196, 10600, 10947, 10971, 11106, 11314, 11683, 11688, 11842,
10820, 11051, 11071, 11113, 11176, 11659, 11750, 11788,
8869, 9138, 9676, 10027, 10240, 10694, 10885, 10897, 10966, 10983, 10988, 11029, 11037, 11043, 11046, 11055, 11056, 11072, 11085, 11115, 11116, 11127, 11198, 11210, 11211, 11214, 11271, 11273, 11275, 11279, 11308, 11322, 11356, 11358, 11367, 11416, 11486, 11520, 11582, 11609, 11623, 11638, 11666, 11670, 11677, 11678, 11679, 11747, 11756, 11782, 11784, 11789, 11805, 11834, 11850, 11853, 11872, 
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9170, 11280, 11618,
*BndFace_finemesh, facenode=3
971, 169, 967,
927, 158, 923,
951, 165, 164,
943, 162, 939,
160, 935, 161,
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950, 954, 949,
*BndFace_coarsemesh, facenode=3
2538, 2542, 2537,
2473, 2436, 2475,
2509, 2473, 2475,
2508, 2532, 2509,
2541, 2509, 2542,
2437, 2441, 1997,
2459, 2066, 2065,
2436, 1999, 2433,
2441, 1998, 1997,
2065, 2064, 2457,
2509, 2475, 2508,
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2456, 2064, 2063,
*End Nconforming
*Set-fix
1902, 1903, 1904, 1905, 1930, 1931, 1932, 1933, 1934, 1935, 1936, 1937, 1938, 1939, 1940, 1941
 1942, 1943, 1944, 1945, 1946, 1947, 1948, 1949, 1950, 1951, 2105, 2106, 2107, 2108, 2109, 2110
 2111, 2112, 2113, 2114
*Set-load
6,  10, 112, 113, 114, 115, 116, 117, 118, 119, 120, 121, 122, 123, 124
*End Assembly
** Section: Section-1
*Solid Section, elset=Set-1, material=Material-1
,
*End Part
**
*Part, name=bracket_length_100mm-2
*Nset, nset=Set-1, generate
 1902,  2912,     1
*Elset, elset=Set-1, generate
  8281,  12179,      1
** Section: Section-1
*Solid Section, elset=Set-1, material=Material-1
,
*End Part
**
**
** ASSEMBLY
**
*Assembly, name=Assembly
**
*Instance, name=bracket_length_100mm-1-1, part=bracket_length_100mm-1
*End Instance
**
*Instance, name=bracket_length_100mm-2-1, part=bracket_length_100mm-2
*End Instance
**
*Nset, nset=hezai, instance=bracket_length_100mm-1-1
   6,  10, 112, 113, 114, 115, 116, 117, 118, 119, 120, 121, 122, 123, 124
*Nset, nset=yueshu, instance=bracket_length_100mm-2-1
 1902, 1903, 1904, 1905, 1930, 1931
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*Elset, elset=_CP-1-bracket_length_100mm-1-1_S3, internal, instance=bracket_length_100mm-1-1
  183,  417,  419,  546,  587,  636
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*Elset, elset=_CP-1-bracket_length_100mm-1-1_S2, internal, instance=bracket_length_100mm-1-1
  702, 1818, 5813, 6426, 6540, 6692, 7082, 7215, 7232, 7253, 7351
*Elset, elset=_CP-1-bracket_length_100mm-1-1_S4, internal, instance=bracket_length_100mm-1-1
 1263, 1626, 4484, 4506, 4713, 4720
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*Elset, elset=_CP-1-bracket_length_100mm-1-1_S1, internal, instance=bracket_length_100mm-1-1
 1790, 2715, 3824, 3836, 3983, 4843
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*Surface, type=ELEMENT, name=CP-1-bracket_length_100mm-1-1
_CP-1-bracket_length_100mm-1-1_S3, S3
_CP-1-bracket_length_100mm-1-1_S2, S2
_CP-1-bracket_length_100mm-1-1_S4, S4
_CP-1-bracket_length_100mm-1-1_S1, S1
*Elset, elset=_CP-1-bracket_length_100mm-2-1_S3, internal, instance=bracket_length_100mm-2-1
  8335,  8394,  8489,  8505,  8544,  8603
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*Elset, elset=_CP-1-bracket_length_100mm-2-1_S4, internal, instance=bracket_length_100mm-2-1
  8411,  8480,  8562,  9170,  9208,  9507
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*Elset, elset=_CP-1-bracket_length_100mm-2-1_S1, internal, instance=bracket_length_100mm-2-1
  8450,  9112,  9474, 10081, 10109, 10196
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*Elset, elset=_CP-1-bracket_length_100mm-2-1_S2, internal, instance=bracket_length_100mm-2-1
  8769,  8923,  9023,  9168,  9640,  9933
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*Surface, type=ELEMENT, name=CP-1-bracket_length_100mm-2-1
_CP-1-bracket_length_100mm-2-1_S3, S3
_CP-1-bracket_length_100mm-2-1_S4, S4
_CP-1-bracket_length_100mm-2-1_S2, S2
_CP-1-bracket_length_100mm-2-1_S1, S1
*Elset, elset=_mian_C_S1, internal, instance=bracket_length_100mm-2-1
  9474, 10196, 10600, 10947, 10971, 11106, 11314, 11683, 11688, 11842
*Elset, elset=_mian_C_S2, internal, instance=bracket_length_100mm-2-1
 10820, 11051, 11071, 11113, 11176, 11659, 11750, 11788
*Elset, elset=_mian_C_S3, internal, instance=bracket_length_100mm-2-1
  8869,  9138,  9676, 10027, 10240, 10694
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*Elset, elset=_mian_C_S4, internal, instance=bracket_length_100mm-2-1
  9170, 11280, 11618
*Surface, type=ELEMENT, name=mian_C
_mian_C_S1, S1
_mian_C_S2, S2
_mian_C_S4, S4
_mian_C_S3, S3
*Elset, elset=_mian_F_S1, internal, instance=bracket_length_100mm-1-1
 1790, 2715, 3824, 3836, 3983, 4843
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*Elset, elset=_mian_F_S2, internal, instance=bracket_length_100mm-1-1
  702, 1818, 5813, 6426, 6540, 6692, 7082, 7215, 7232, 7253, 7351
*Elset, elset=_mian_F_S3, internal, instance=bracket_length_100mm-1-1
  183,  417,  419,  546,  587,  636
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*Elset, elset=_mian_F_S4, internal, instance=bracket_length_100mm-1-1
 1263, 1626, 4484, 4506, 4713, 4720
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*Surface, type=ELEMENT, name=mian_F
_mian_F_S1, S1
_mian_F_S2, S2
_mian_F_S4, S4
_mian_F_S3, S3
** Constraint: CP-1-bracket_length_100mm-2-1-bracket
*Tie, name=CP-1-bracket_length_100mm-2-1-bracket, adjust=yes, type=SURFACE TO SURFACE
CP-1-bracket_length_100mm-1-1, CP-1-bracket_length_100mm-2-1
*End Assembly
**
** MATERIALS
**
*Material, name=Material-1
*Elastic
210000., 0.3
** ----------------------------------------------------------------
**
** STEP: Step-1
**
*Step, name=Step-1, nlgeom=NO
*Static
1., 1., 1e-05, 1.
**
** BOUNDARY CONDITIONS
**
** Name: BC-1 Type: 对称/反对称/完全固定
*Boundary
yueshu, ENCASTRE
**
** LOADS
**
** Name: Load-1   Type: Concentrated force
*Cload
hezai, 1, 100.
**
** OUTPUT REQUESTS
**
*Restart, write, frequency=0
**
** FIELD OUTPUT: F-Output-1
**
*Output, field, variable=PRESELECT
**
** HISTORY OUTPUT: H-Output-1
**
*Output, history, variable=PRESELECT
*End Step
